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/batch
! ANSYS input file written by Workbench version 2025 R1
! File used for geometry attach: C:\Users\018219877\Downloads\Part1.STEP
/title,--Static Structural
/COM,/COM,     ANSYSMotion, 2025.1
/com,--- Data in consistent MKS units. See Solving Units in the help system for more information.
/units,MKS
/prep7
! Turn off shape checking because checks already performed inside WB mesher.
! See help system for more information.
SHPP,OFF,,NOWARN
!etcon,set             ! Don't issue ETCON,SET due to AM print process simulation
/com,*********** Nodes for the whole assembly ***********
nblock,3,,14822
(1i9,3e20.9e3)
     4236     4.500000000E-03     4.500000000E-03    -5.000000000E-04
     4237     4.500000000E-03     4.500000000E-03    -1.000000000E-03
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-1
/com,*********** Elements for Body 1 'Part1|part' ***********
et,1,185
eblock,19,solid,,3440
(19i9)
        1        1        1        1        0        0        0        0        8        0        1     4103     4092     4091     4102     4235     4224     4223     4234
        1        1        1        1        0        0        0        0        8        0        2     4102     4091     4090     4101     4234     4223     4222     4233
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-1
/com,*********** Elements for Body 2 'Support' ***********
et,2,185
eblock,19,solid,,948
(19i9)
        2        2        1        2        0        0        0        0        8        0     7649     4192     4060     4071     4203    12407    12405    12406    12408
        2        2        1        2        0        0        0        0        8        0     7650    12407    12405    12406    12408    12411    12409    12410    12412
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-1
/com,*********** Elements for Body 3 'Part1|base' ***********
et,3,186
keyo,3,2,1          ! set full integration on SOLID186
eblock,19,solid,,1600
(19i9)
        3        3        3        3        0        0        0        0       20        0     3441     4236     6303     6282     6205     5679     6342     6281     6280
     6446    12132    11999     6445    10924    12130    12128    10923     6444    12192    12129    11998
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-1
/com,*********** Send User Defined Coordinate System(s) ***********
csys,0
toffst,273.15,      ! Temperature offset from absolute zero
/com,*********** Set Reference Temperature ***********
tref,22.
/com,*********** Send Materials ***********
MP,REFT,1,1260,
Temperature = 'TEMP' ! Temperature
MPTEMP,,,,,,,,
MPTEMP,1,20
MPTEMP,2,227
MPTEMP,3,427
MPTEMP,4,727
MPTEMP,5,927
MPTEMP,6,1127
MPTEMP,7,1260
MPTEMP,8,1344
MPTEMP,9,1450
MPTEMP,10,1527
MPTEMP,11,1827
MPDATA,DENS,1, ,8220,8121,8048,7961,7875,7787,
MPDATA,DENS,1, ,7733,7579,7488,7488,7341,	! kg m^-3
MPTEMP,,,,,,,,
MPTEMP,,,,,,,,
MPTEMP,1,427
MPTEMP,2,538
MPTEMP,3,649
MPTEMP,4,871
MPTEMP,5,1093
MPTEMP,6,1827
MPDATA,ALPX,1, ,1.436e-05,1.49e-05,1.543e-05,1.745e-05,1.834e-05,1.834e-05,	! C^-1
MPTEMP,,,,,,,,
MPAMOD,1,20,	! C
MPTEMP,,,,,,,,
MPTEMP,1,21
MPTEMP,2,537
MPTEMP,3,815
MPTEMP,4,982
MPTEMP,5,1093
MPDATA,EX,1, ,165000000000,152000000000,110000000000,55000000000,34000000000,	! Pa
MPTEMP,,,,,,,,
MPTEMP,,,,,,,,
MPTEMP,1,21
MPTEMP,2,537
MPTEMP,3,815
MPTEMP,4,982
MPTEMP,5,1093
MPDATA,NUXY,1, ,0.3,0.28,0.323,0.368,0.4,
MPTEMP,,,,,,,,

TB,BISO,1,5,
TBTEMP,21
TBDATA,1,648000000,3000000000
TBTEMP,538
TBDATA,1,558000000,2760000000
TBTEMP,816
TBDATA,1,338000000,10000000
TBTEMP,982
TBDATA,1,90000000,10000000
TBTEMP,1093
TBDATA,1,34000000,10000000
MPTEMP,,,,,,,,
MPTEMP,1,22
MPTEMP,2,233
MPTEMP,3,448
MPTEMP,4,657
MPTEMP,5,866
MPTEMP,6,1079
MPTEMP,7,1289
MPTEMP,8,1500
MPDATA,KXX,1, ,11.9,13.7,16.9,21.7,25.6,22.9,
MPDATA,KXX,1, ,19.1,17.7,	! W m^-1 C^-1
MPTEMP,,,,,,,,
MPTEMP,,,,,,,,
MPTEMP,1,20
MPTEMP,2,100
MPTEMP,3,200
MPTEMP,4,300
MPTEMP,5,400
MPTEMP,6,500
MPTEMP,7,600
MPTEMP,8,700
MPTEMP,9,800
MPTEMP,10,850
MPTEMP,11,900
MPTEMP,12,1000
MPTEMP,13,1100
MPTEMP,14,1500
MPDATA,C,1, ,421,442,453,472,481,502,
MPDATA,C,1, ,527,562,606,628,636,647,
MPDATA,C,1, ,651,652,	! J kg^-1 C^-1
MPTEMP,,,,,,,,

MP,REFT,2,1260,
Temperature = 'TEMP' ! Temperature
MPTEMP,,,,,,,,
MPTEMP,1,20
MPTEMP,2,227
MPTEMP,3,427
MPTEMP,4,727
MPTEMP,5,927
MPTEMP,6,1127
MPTEMP,7,1260
MPTEMP,8,1344
MPTEMP,9,1450
MPTEMP,10,1527
MPTEMP,11,1827
MPDATA,DENS,2, ,8220,8121,8048,7961,7875,7787,
MPDATA,DENS,2, ,7733,7579,7488,7488,7341,	! kg m^-3
MPTEMP,,,,,,,,
MPTEMP,,,,,,,,
MPTEMP,1,427
MPTEMP,2,538
MPTEMP,3,649
MPTEMP,4,871
MPTEMP,5,1093
MPTEMP,6,1827
MPDATA,ALPX,2, ,1.436e-05,1.49e-05,1.543e-05,1.745e-05,1.834e-05,1.834e-05,	! C^-1
MPTEMP,,,,,,,,
MPAMOD,2,20,	! C
MPTEMP,,,,,,,,
MPTEMP,1,21
MPTEMP,2,537
MPTEMP,3,815
MPTEMP,4,982
MPTEMP,5,1093
MPDATA,EX,2, ,165000000000,152000000000,110000000000,55000000000,34000000000,	! Pa
MPTEMP,,,,,,,,
MPTEMP,,,,,,,,
MPTEMP,1,21
MPTEMP,2,537
MPTEMP,3,815
MPTEMP,4,982
MPTEMP,5,1093
MPDATA,NUXY,2, ,0.3,0.28,0.323,0.368,0.4,
MPTEMP,,,,,,,,

TB,BISO,2,5,
TBTEMP,21
TBDATA,1,648000000,3000000000
TBTEMP,538
TBDATA,1,558000000,2760000000
TBTEMP,816
TBDATA,1,338000000,10000000
TBTEMP,982
TBDATA,1,90000000,10000000
TBTEMP,1093
TBDATA,1,34000000,10000000
MPTEMP,,,,,,,,
MPTEMP,1,22
MPTEMP,2,233
MPTEMP,3,448
MPTEMP,4,657
MPTEMP,5,866
MPTEMP,6,1079
MPTEMP,7,1289
MPTEMP,8,1500
MPDATA,KXX,2, ,11.9,13.7,16.9,21.7,25.6,22.9,
MPDATA,KXX,2, ,19.1,17.7,	! W m^-1 C^-1
MPTEMP,,,,,,,,
MPTEMP,,,,,,,,
MPTEMP,1,20
MPTEMP,2,100
MPTEMP,3,200
MPTEMP,4,300
MPTEMP,5,400
MPTEMP,6,500
MPTEMP,7,600
MPTEMP,8,700
MPTEMP,9,800
MPTEMP,10,850
MPTEMP,11,900
MPTEMP,12,1000
MPTEMP,13,1100
MPTEMP,14,1500
MPDATA,C,2, ,421,442,453,472,481,502,
MPDATA,C,2, ,527,562,606,628,636,647,
MPDATA,C,2, ,651,652,	! J kg^-1 C^-1
MPTEMP,,,,,,,,

Temperature = 'TEMP' ! Temperature
MP,DENS,3,7850,	! kg m^-3
MP,ALPX,3,1.2e-05,	! C^-1
MP,C,3,434,	! J kg^-1 C^-1
MP,KXX,3,60.5,	! W m^-1 C^-1
MP,RSVX,3,1.7e-07,	! kg m^3 A^-2 s^-3
MP,EX,3,200000000000,	! Pa
MP,NUXY,3,0.3,
MP,MURX,3,10000,

!************************* Model Summary ********************
!Part1|part,	Inconel 718,	matid,	1
!Support,	Inconel 718,	matid,	2
!Part1|base,	Structural Steel,	matid,	3
!************************* End Model Summary ********************
CMBLOCK,_CMAMSUPPORT1,ELEM,      948
(8i10)
      7649      7650      7651      7652      7653      7654      7655      7656
      7657      7658      7659      7660      7661      7662      7663      7664
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cmsel,s,_CMAMSUPPORT1
esel,all
tblist
fini
/com,****************************************************************************
/com,*************************    SOLUTION       ********************************
/com,****************************************************************************
/solu
antype,0                   ! static analysis
_thickRatio=  1     ! Ratio of thick parts in the model
eqsl,pcg,1e-8,,,,,,1
cntr,print,1               ! print out contact info and also make no initial contact an error
cncheck,dmp		!	Enable program controlled contact splitting for distributed memory parallel run
dmpoption,emat,no             ! Don't combine emat file for DANSYS
dmpoption,esav,no             ! Don't combine esav file for DANSYS

/com,*********** Send AM Knockdown Factors ***********
*create,knockdown,ist
/dtyp,kdel

*end
inistate,read,knockdown,ist
/delete,knockdown,ist
! End of Sending AM Knockdown Factors
/com,*********** Send AM Build Options ***********
amtype,pbf          ! Additive Manufacturing process type
nropt,full          ! Use full Newton-Raphson
ambuild,plate,0.    ! Send top of build plate location
ammat,1,1260.       ! Send melting temperature for build Body
ammat,2,1260.       ! Send melting temperature for support Body
ambuild,layert,1.e-004,3.00000005960464e-004      ! deposition thickness and layer height
ambuild,ssf,1.
ambuild,scan,1.e-004,1000.    ! hatch spacing and laser speed
ambeam,1  ! Send number of heat sources
ambuild,time,10.,1. ! time to reset recoater arm, and the dwell time multiple
*dim,suppsect,,1    ! Send array for support sections
suppsect(1) = 4          ! section value
sect,4,support,ASEC ! sectype definition for support
secdata,0.5,0.5,0.5,0.5,0.5,0.5,0.5,0.5 ! support knockdown factor
amsupport,1,_CMAMSupport,suppsect       ! AMSupport definition
pred,off                   ! turn off predictor due to AM print process simulation
ambuild,rthfile,'C:\Users\018219877\Downloads\LBPF\ANSYS\lpbfsim_Mech_Files\TransientThermal_2\file'          ! thermal file path for build/cooldown step
amstep,preheat,120. ! Build Plate Preheat Temperature
! End of Sending AM Build Options
nldiag,cont,iter           ! print out contact info each equilibrium iteration
rescontrol,define,last,last,,dele	   ! Program Controlled
/com,****************************************************
/com,******************* SOLVE FOR LS 1 OF 2 ****************
outres,erase
outres,all,none
outres,nsol,all,
outres,rsol,all
outres,etmp,all
outres,strs,all,
outres,epel,all,
outres,eppl,all,
outres,epth,all,
amres,rint,on
amres,hstn,on
lnsr,on                    ! Line search turned ON by automatically due to AM Process Simulation
/com,*********** Send AM Build Conditions Options ***********
amenv,120.,0.       ! Gas Temperature and Convection Coefficient
ampowder,120.,0.,1.e-002      ! Powder Temperature, Convection Coefficient, and factor
! *********** WB SOLVE COMMAND ***********
! check interactive state
*get,ANSINTER_,active,,int
*if,ANSINTER_,ne,0,then
/eof
*endif
amstep,build        ! perform the layer-by-layer build
*get,_buildStepEndTime,common,,stepcm,,dp,1          !Get build step end time
/com *************** Write FE CONNECTORS *********
CEWRITE,file,ce,,INTE
/com,****************************************************
/com,*************** FINISHED SOLVE FOR LS 1 *************
/com,****************************************************
/com,******************* SOLVE FOR LS 2 OF 2 ****************
outres,erase
outres,all,none
outres,nsol,all,
outres,rsol,all
outres,etmp,all
outres,strs,all,
outres,epel,all,
outres,eppl,all,
outres,epth,all,
amres,rint,on
amres,hstn,on
lnsr,on                    ! Line search turned ON by automatically due to AM Process Simulation
/com,*********** Send AM Cooldown Conditions Options ***********
amenv,22.,20.       ! Gas Temperature and Convection Coefficient
ampowder,22.,5.,1.e-002       ! Powder Temperature, Convection Coefficient
amstep,cooldown,22. ! cool down to room temperature
/com,****************************************************
/com,*************** FINISHED SOLVE FOR LS 2 *************
*get,_NSOLTHREADS,active,0,ntfs
*get,_NSOLPROCESSES,active,0,npfs
*get,_PCGITER,active,,solu,cgiter
/post1
fini
